|3.7039 - 3.704|*100*%/|3.704| = 2.69978e-5
x + cos(y/sqrt(3))
D(x, y) := x + cos(y/sqrt(3))
y[0] := 2.1
Z := rkfixed(y, 1.2, 2.2, 10, D)
i := 0 .. rows(Z) - 1
Z = [
    1.2, 2.1;
    1.3, 2.25582;
    1.4, 2.41294;
    1.5, 2.57111;
    1.6, 2.73015;
    1.7, 2.89;
    1.8, 3.05065;
    1.9, 3.21217;
    2, 3.37472;
    2.1, 3.53852;
    2.2, 3.70386
]
X := [1.2; 1.3; 1.4; 1.5; 1.6; 1.7; 1.8; 1.9; 2.0; 2.1; 2.2]
Q := [2.1; 2.255; 2.4116; 2.5693; 2.7281; 2.8877; 3.048; 3.2092; 3.3714; 3.5347; 3.6994]
W := [2.1; 2.2558; 2.413; 2.5711; 2.7302; 2.89; 3.0507; 3.2122; 3.3748; 3.5385; 3.7039]
E := [2.1; 2.2558; 2.4129; 2.5711; 2.7302; 2.89; 3.0506; 3.2122; 3.3747; 3.5385; 3.7039]
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((3.548*10)^-4 + 5.391*10^-4 + 7.006*10^-4 + 7.698*10^-4 + 7.965*10^-4 + 8.53*10^-4 + 9.348*10^-4 + 9.788*10^-4 + 1.075*10^-3 + 1.216*10^-3)/11 = 0.00071493
(4.144*10^-5 + 3.278*10^-5 + 2.963*10^-5)/11 = 9.44091e-6
(3.663*10^-5 + 3.278*10^-5 + 2.963*10^-5 + 5.652*10^-5 + 2.7*10^-5)/11 = 1.65964e-5
|3.7039 - 3.704|*100*%/|3.704| = 2.69978e-5
D(x, y) := x^2 + y^3
y[0] := 0
Z := rkfixed(y, 0, 1, 10, D)
i := 0 .. rows(Z) - 1
Z = [
    0, 0;
    0.1, 0.000333333;
    0.2, 0.00266667;
    0.3, 0.00900002;
    0.4, 0.0213337;
    0.5, 0.0416703;
    0.6, 0.0720225;
    0.7, 0.114438;
    0.8, 0.171066;
    0.9, 0.244304;
    1, 0.337112
]
Q := [0; 0.001; 0.005; 0.014; 0.03; 0.055; 0.091; 0.14; 0.2044; 0.2862; 0.388]
W := [0; 0.0002; 0.0025; 0.0088; 0.021; 0.041; 0.0715; 0.1138; 0.1703; 0.2434; 0.336]
E := [0; 0.0005; 0.003; 0.0095; 0.022; 0.0425; 0.073; 0.1156; 0.1724; 0.2458; 0.3388]
X := [0; 0.1; 0.2; 0.3; 0.4; 0.5; 0.6; 0.7; 0.8; 0.9; 1]
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2.853/11 = 0.259364
sum(|(Z[:, 1][i] - Q[i])|*100*%/|Q[i]|, i = 1 .. 10) = 2.85346
0.667/11 = 0.0606364
sum(|(Z[:, 1][i] - W[i])|*100*%/|W[i]|, i = 1 .. 1) = 0.666667
0.589/11 = 0.0535455
sum(|(Z[:, 1][i] - E[i])|*100*%/|E[i]|, i = 1 .. 10) = 0.589125
