D(x, y) := y^2 + y/x + 1/x^2
y[0] := 0
Z := rkfixed(y, 1, 1.8, 8, D)
Z = [
    1, 0;
    1.1, 0.0957745;
    1.2, 0.185813;
    1.3, 0.273604;
    1.4, 0.362213;
    1.5, 0.45466;
    1.6, 0.554256;
    1.7, 0.665007;
    1.8, 0.792186
]
R := [0; 0.0958; 0.1858; 0.2736; 0.3622; 0.4547; 0.5501; 0.6579; 0.781]
X := [1; 1.1; 1.2; 1.3; 1.4; 1.5]
Q := [0; 0.0958; 0.1858; 0.2736; 0.3622; 0.4547]
W := [0; 0.0958; 0.1858; 0.2736; 0.3622; 0.4547]
E := [0; 0.0958; 0.1858; 0.2736; 0.3622; 0.4547]
i := 0 .. rows(Z) - 1
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|0.665 - 0.6579|/|0.6579|*100*% = 0.0107919
|3.7039 - 3.704|*100*%/|3.704| = 2.69978e-5
D(x, y) := x^2 + y^3
y[0] := 0
Z := rkfixed(y, 0, 1, 10, D)
i := 0 .. rows(Z) - 1
Z = [
    0, 0;
    0.1, 0.000333333;
    0.2, 0.00266667;
    0.3, 0.00900002;
    0.4, 0.0213337;
    0.5, 0.0416703;
    0.6, 0.0720225;
    0.7, 0.114438;
    0.8, 0.171066;
    0.9, 0.244304;
    1, 0.337112
]
Q := [0; 0.001; 0.005; 0.014; 0.03; 0.055; 0.091; 0.14; 0.2044; 0.2862; 0.388]
W := [0; 0.0002; 0.0025; 0.0088; 0.021; 0.041; 0.0715; 0.1138; 0.1703; 0.2434; 0.336]
E := [0; 0.0005; 0.003; 0.0095; 0.022; 0.0425; 0.073; 0.1156; 0.1724; 0.2458; 0.3388]
X := [0; 0.1; 0.2; 0.3; 0.4; 0.5; 0.6; 0.7; 0.8; 0.9; 1]
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2.853/11 = 0.259364
sum(|(Z[:, 1][i] - Q[i])|*100*%/|Q[i]|, i = 1 .. 10) = 2.85346
0.667/11 = 0.0606364
sum(|(Z[:, 1][i] - W[i])|*100*%/|W[i]|, i = 1 .. 1) = 0.666667
0.589/11 = 0.0535455
sum(|(Z[:, 1][i] - E[i])|*100*%/|E[i]|, i = 1 .. 10) = 0.589125
