S = 1 1/Ω
nz := [1; 0.5]
D(x, u) := [u[0]*u[1] + x; x^2 - u[0]^2]
S := rkfixed(nz, 0, 1, 10, D)
Y := S[:, 1]
Z := S[:, 2]
X := S[:, 0]
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K := S[:, 0]
L := S[:, 1]
.
J := S[:, 2]
S = [
    0, 1, 0.5;
    0.1, 1.05093, 0.39518;
    0.2, 1.10239, 0.281563;
    0.3, 1.15233, 0.160735;
    0.4, 1.19881, 0.0347678;
    0.5, 1.24018, -0.0937487;
    0.6, 1.27527, -0.221753;
    0.7, 1.30357, -0.345834;
    0.8, 1.32531, -0.462417;
    0.9, 1.34144, -0.567984;
    1, 1.35355, -0.659294
]
V := [
    0, 1, 0.5;
    0.1, 1.051, 0.395;
    0.2, 1.102, 0.282;
    0.3, 1.152, 0.161;
    0.4, 1.199, 0.035;
    0.5, 1.24, -0.094;
    0.6, 1.275, -0.222;
    0.7, 1.304, -0.346;
    0.8, 1.325, -0.462;
    0.9, 1.341, -0.568;
    1, 1.354, -0.659
]
