nz0 := [0; 0]
nz1 := [1; 0]
nz2 := [0; 1]
Q(x) := 2*sqrt(1 + x)
D0(x, u) := [u[1]; 1*u[1]/(2*(x + 1)) - 1/sqrt((x + 1)^3)]
D1(x, u) := [u[1]; 1*u[1]/(2*(x + 1))]
D2(x, u) := [u[1]; 1*u[1]/(2*(x + 1))]
F := [2; 2.0976; 2.1909; 2.2804; 2.3664; 2.4495; 2.5298; 2.6077; 2.6833; 2.7568; 2.8284]
Y := [2.068; 2.1827; 2.2823; 2.3777; 2.4690; 2.5564; 2.64; 2.72; 2.7963; 2.8692; 2.9387]
X := [0; 0.1; 0.2; 0.3; 0.4; 0.5; 0.6; 0.7; 0.8; 0.9; 1]
Z0 := rkfixed(nz0, 0, 1, 10, D0)
Z1 := rkfixed(nz1, 0, 1, 10, D1)
Z2 := rkfixed(nz2, 0, 1, 10, D2)
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D(x, u) := [u[1]; x*u[0] - 1 - 2/x*u[1]]
nz := [0; 0]
Z := rkfixed(nz, 0.5, 1, 5, D)
Z0 = [
    0, 0, 0;
    0.1, -0.00484227, -0.0953465;
    0.2, -0.0187995, -0.182575;
    0.3, -0.0411349, -0.263118;
    0.4, -0.0712368, -0.338062;
    0.5, -0.108589, -0.408249;
    0.6, -0.15275, -0.474342;
    0.7, -0.203339, -0.536876;
    0.8, -0.260022, -0.596286;
    0.9, -0.322504, -0.652929;
    1, -0.390525, -0.707108
]
X := Z[:, 0]
S0 := Z[:, 2]
Y0 := Z[:, 1]
Z = [
    0.5, 0, 0;
    0.6, -0.00445133, -0.0843307;
    0.7, -0.0162283, -0.148927;
    0.8, -0.0339172, -0.203711;
    0.9, -0.0568147, -0.253728;
    1, -0.0846047, -0.30196
]
Z1 = [
    0, 1, 0;
    0.1, 1, 0;
    0.2, 1, 0;
    0.3, 1, 0;
    0.4, 1, 0;
    0.5, 1, 0;
    0.6, 1, 0;
    0.7, 1, 0;
    0.8, 1, 0;
    0.9, 1, 0;
    1, 1, 0
]
Z2 = [
    0, 0, 1;
    0.1, 0.10246, 1.04881;
    0.2, 0.209689, 1.09545;
    0.3, 0.321485, 1.14018;
    0.4, 0.437668, 1.18322;
    0.5, 0.558078, 1.22474;
    0.6, 0.682572, 1.26491;
    0.7, 0.811019, 1.30384;
    0.8, 0.943302, 1.34164;
    0.9, 1.07931, 1.3784;
    1, 1.21895, 1.41421
]
c1 := 0
c2 := 0
Given
c1 - c2 == 1
0.5*(-0.4462 + c1 + c2*1.233) + 2*(-0.835 + c2*1.4177) == 2*sqrt(2)
[q; a] := Find(c1, c2) = [2.06823; 1.06823]
