c1 := 0
c2 := 0
a11 := integral((2 + 1.5*2*x/(x + 1))*x^2, x = 0 .. 1) = 1.08723
a21 := integral((6*x + 1.5/(x + 1)*x^2)*x^3, x = 0 .. 1) = 1.33528
Given
0.5717*c1 + 0.808458753157*c2 == 0.1
a12 := integral((2 + 1.5*2*x/(x + 1))*x^3, x = 0 .. 1) = 0.829442
0.487*c1 + 0.688250600355*c2 == 0.2
X := [0; 0.1; 0.2; 0.3; 0.4; 0.5; 0.6; 0.7; 0.8; 0.9; 1]
a22 := integral((6*x + 1.5*x^2*3/(x + 1))*x^3, x = 0 .. 1) = 1.60584
C := [0.47; 0.62; 0.77; 0.92; 1.071; 1.22; 1.37; 1.52; 1.67; 1.823; 1.97]
Z := [0.75; 0.88; 1.009; 1.139; 1.27; 1.403; 1.538; 1.674; 1.812; 1.951; 2.09]
Find(c1, c2) = [376.673; -266.24]
b1 := integral((2/sqrt(x + 1) - 1.5/(x + 1)*sqrt(2))*x^2, x = 0 .. 1) = 0.0968049
b2 := integral((2/sqrt(x + 1) - 1.5/(x + 1)*sqrt(2))*x^3, x = 0 .. 1) = 0.076572
c1 := 0
c2 := 0
Q(x) := 2/3*sqrt((x + 1)^3)
Given
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a11*c1 + a21*c2 == b1
a12*c1 + a22*c2 == b2
0.667 - 0.494 = 0.173
Find(c1, c2) = [0.0833496; 0.00463209]
Q(0) = 0.666667
x := 0
f1 := x^2
f2 := x^3
d/dx(f1) = 0
d/dx(f2) = 0
x := 1
f2 - d/dx(f2) = 0
f1 - d/dx(f1) = 0
