u(x) := 1 + 1/2*x - 1/4*integral((1/8*x^3 - 1/5*s^2)*u(s), s = 1 .. 2)
A(x) := integral((1/8*x^3 - 1/5*s^2)*u(s), s = 1 .. 2)
u0(x) := 1 + 1/2*x
u1(x) := 1 + 1/2*x - 1/4*integral((1/8*x^3 - 1/5*s^2)*u0(s), s = 1 .. 2)
U0 := [1.5; 1.55; 1.6; 1.65; 1.7; 1.75; 1.8; 1.85; 1.9; 1.95; 2]
U1 := [1.658; 1.689; 1.717; 1.742; 1.76; 1.776; 1.786; 1.79; 1.79; 1.784; 1.77]
U2 := [1.653; 1.685; 1.713; 1.737; 1.756; 1.772; 1.78; 1.786; 1.785; 1.778; 1.765]
X := [1; 1.1; 1.2; 1.3; 1.4; 1.5; 1.6; 1.7; 1.8; 1.9; 2]
u2(x) := 1 + 1/2*x - 1/4*integral((1/8*x^3 - 1/5*s^2)*u1(s), s = 1 .. 2)
integral(1*x^3/8, x = 1 .. 2) = 0.46875
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1.786
u2(1.7) = 1.78676
