u1(x, y) := 40*y^2
u2(x, y) := 40
u3(x, y) := 40
a := [
    1, 1, 1, 1, 1, 1;
    1, 1, 1, 1, 1, 1;
    1, 1, 1, 1, 1, 1;
    1, 1, 1, 1, 1, 1;
    1, 1, 1, 1, 1, 1;
    1, 1, 1, 1, 1, 1
]
u4(x, y) := 40*sin(π*x/2)
b := [
    1, 1, 1, 1, 1, 1;
    1, 1, 1, 1, 1, 1;
    1, 1, 1, 1, 1, 1;
    1, 1, 1, 1, 1, 1;
    1, 1, 1, 1, 1, 1;
    1, 1, 1, 1, 1, 1
]
c := [
    1, 1, 1, 1, 1, 1;
    1, 1, 1, 1, 1, 1;
    1, 1, 1, 1, 1, 1;
    1, 1, 1, 1, 1, 1;
    1, 1, 1, 1, 1, 1;
    1, 1, 1, 1, 1, 1
]
d := [
    1, 1, 1, 1, 1, 1;
    1, 1, 1, 1, 1, 1;
    1, 1, 1, 1, 1, 1;
    1, 1, 1, 1, 1, 1;
    1, 1, 1, 1, 1, 1;
    1, 1, 1, 1, 1, 1
]
e := -4*[
    1, 1, 1, 1, 1, 1;
    1, 1, 1, 1, 1, 1;
    1, 1, 1, 1, 1, 1;
    1, 1, 1, 1, 1, 1;
    1, 1, 1, 1, 1, 1;
    1, 1, 1, 1, 1, 1
]
h := 0.2
w := 0.2
f := [
    0, 0, 0, 0, 0, 0;
    0, 0, 0, 0, 0, 0;
    0, 0, 0, 0, 0, 0;
    0, 0, 0, 0, 0, 0;
    0, 0, 0, 0, 0, 0;
    0, 0, 0, 0, 0, 0
]
u := [
    u1(0, 1), 40, 40, 40, 40, 40;
    u1(0, 0.8), 0, 0, 0, 0, 40;
    u1(0, 0.6), 0, 0, 0, 0, 40;
    u1(0, 0.4), 0, 0, 0, 0, 40;
    u1(0, 0.2), 0, 0, 0, 0, 40;
    u1(0, 0), u4(0.2, 0), u4(0.4, 0), u4(0.6, 0), u4(0.8, 0), u4(1, 0)
] = [
    40, 40, 40, 40, 40, 40;
    25.6, 0, 0, 0, 0, 40;
    14.4, 0, 0, 0, 0, 40;
    6.4, 0, 0, 0, 0, 40;
    1.6, 0, 0, 0, 0, 40;
    0, 12.3607, 23.5114, 32.3607, 38.0423, 40
]
relax(a, b, c, d, e, f, u, w) = [
    40, 40, 40, 40, 40, 40;
    25.6, 30.5431, 33.9239, 36.4066, 38.3414, 40;
    14.4, 22.6485, 28.7459, 33.3611, 36.9589, 40;
    6.4, 16.9049, 25.0504, 31.3332, 36.1332, 40;
    1.6, 13.5208, 23.2176, 30.7881, 36.2409, 40;
    0, 12.3607, 23.5114, 32.3607, 38.0423, 40
]
