# Лабораторная рабата ¹1
# Тема: Решение задачи Дирихле в области простой геометрии.
# Цель: Научиться находить решения задачи Дирихле для уравнения Лапласа.
# Выполнила: студентка 4 курса группы П-42 Рудькова Татьяна Сергеевна.
# Вариант: 6.
# Ход выполнения работы:
# Задание
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# Дана задача Дирихле для уравнения Лапласа
# в квадрате АВСD с вершинами A(0; 0), B (0; 1), C(1; 1), D(1; 0).
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# Дано уравнение Лапласса(эллиптического типа) и граничные условия на сторонах единичного квадрата:
u(A, B) == 30*sin(π*y)
u(C, D) == 20*y
u(B, C) == 20*x
u(A, D) == 30*x*(1 - x)
# Процесс решения проведем в несколько этапов.
# 1 ) Построим в области решения квадратную сетку с шагом
h := 0.5
a := 1  # - конец отрезка по стороне х
d := 1  # - конец отрезка по стороне y
n1 := a/h
n1 = 2  # количество шагов
n2 := d/h
n2 = 2
Следовательно
n1 == n2 == n
n := 2
x :=
    for i ∈ 0 .. n
        x[i] ← i*h
    x
y :=
    for i ∈ 0 .. n
        y[i] ← i*h
    y
x = [0; 0.5; 1]
y = [0; 0.5; 1]
# 2 ) Вычислим значение функции в граничных узлах, а во внутренних положим, что они  равные 0, т.к. их значения пока неизвестны.И заполняем матрицу:
A :=
    for i ∈ 0 .. n
        A[i, 0] ← 30*sin(π*y[i])
        A[n, i] ← 20*x[i]
        A[i, n] ← 20*y[i]
        A[0, i] ← 30*x[i]*(1 - x[i])
    return A
# Получим сдедующую матрицу:
A = [0, 7.5, 0; 30, 0, 10; 0, 10, 20]
# 3 ) Для определения значений функции во внутренних узлах воспользуемся конечно-разностной аппроксимацией
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# T.e. значение функции в центре определяется, как среднее арифметическое значений в остальных узлах.
# В результате получим СЛАУ(16 уравнений), которую будем решать методом Зейделя, с точностью до сотых,а начальное приближение примем нулевым.
Zeidel(A) :=
    B ← A
    s ← 0
    e ← 0.01
    while e > 0.001
        for i ∈ 1 .. n - 1
            for j ∈ 1 .. n - 1
                A[i, j] ← 1/4*(A[i - 1, j] + A[i + 1, j] + A[i, j - 1] + A[i, j + 1])
        e ← norm2(B - A)
        B ← A
        s ← s + 1
    return A
Y := Zeidel(A)
Y = [0, 7.5, 0; 30, 14.375, 10; 0, 10, 20]
# 4 ) Найдем приближенное решение, используя возможности Mathcad, которое примем за точное решение, т.е. воспользуемся функцией relax
r := 6  # размер сетки
i := 0 .. r - 1
j := 0 .. r - 1
# Матрицы a, b, c, d, e будут содержать коэффициенты исходного уравнения Пуассона. Стандартные значения для этих матриц
a[i, j] := 1
b := a
c := a
d := a
e := -4*a
# Матрица f - квадратная матрица, содержащая значения правой части  исходного уравнения в каждой точке внутри квадрата
f[i, j] := 0
# Первый и последний столбцы и первая и последняя строки матрицы A задают граничные условия для решения уравнения. Значения внутренних элементов матрицы не играют особой роли, а используются лишь как начальное приближение при поиске решения.
A := [
    0, 4.8, 7.2, 7.2, 4.8, 0;
    17.634, 0, 0, 0, 0, 4;
    28.532, 0, 0, 0, 0, 8;
    28.532, 0, 0, 0, 0, 12;
    17.634, 0, 0, 0, 0, 16;
    3.674*10^-15, 4, 8, 12, 16, 20
]
# Тогда точное решение
Ytoch := relax(a, b, c, d, e, f, A, h)
Ytoch = [
    0, 4.8, 7.2, 7.2, 4.8, 0;
    17.634, 12.861, 10.6422, 8.94297, 6.80867, 4;
    28.532, 18.3678, 13.5649, 11.1211, 9.49171, 8;
    28.532, 18.5132, 14.1285, 12.4847, 12.0372, 12;
    17.634, 13.0246, 11.9513, 12.6521, 14.1723, 16;
    0, 4, 8, 12, 16, 20
]
# 5 ) Теперь найдем погрешность наших вычислений
Pogr :=
    for i ∈ 0 .. n - 1
        for j ∈ 0 .. n - 1
            P[i, j] ← |Ytoch[i, j] - Y[i, j]|/Ytoch[i, j]*100
    P ← P
# [component: inputs Ytoch, Y]
Pogr = [0, 56.25; 70.1259, 11.7722]
# Т.к погрешности получилисть достаточно малыми(меньше 1%), то можно сделать вывод, что решение задачи Дирихле методом сеток получается практически точным.
